finish
/clear

L=10
Fa=-100
k1=100
k2=200
k3=300

/prep7
et,1,14
keyopt,1,2,1
r,1,k1
r,2,k2
r,3,k3
rlist

n,1,0,0,0
n,2,L,0,0
n,3,L,L/2,0
n,4,L,-L/2,0
n,5,L+L,L/2,0
n,6,L+L,0,0
n,7,L+L,-L/2,0

real,1
e,1,2

real,2
e,2,6

real,3
e,3,5
e,4,7

eplot

cp,1,ux,2,3,4

d,5,ux,0
d,6,ux,0
d,7,ux,0

f,1,fx,Fa

finish


/SOL
/STATUS,SOLU
SOLVE
